f := 3
λ := 30/f = 10
dx := λ/2 = 5
N := 32
L := dx*(N - 1) = 155
k := 2*π/λ
f_1(θ) := cos(θ)
i := 0 .. N - 1
X[i] := dx*i - L/2
cosec(x) := 1/sin(x)
θ_1 := 30*deg
θ_2 := 60*deg
f(θ) :=
    cosec(θ)/cosec(θ_1) if θ ≥ θ_1 and θ ≤ θ_2
    0 otherwise
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A(x) := 1/(2*π)*integral(f(θ)*f_1(θ)*e^(1i*k*x*sin(θ)), θ = -π .. π)
A_0 := vectorize(A(X))
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F(θ) := 1/sum(vectorize(|A_0|))*sum(A_0[i]*f_1(θ)*e^(-1i*k*X[i]*sin(θ)), i = 0 .. N - 1)
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